<?xml version="1.0"?>
<!-- Generated by Aero-Matic v 1.1
	Manufacturer	: MT-Propeller
	Model		: MTV-5-1-D-C-F-R(A)/CFR210-56

     Inputs:
                horsepower: 450
                     pitch: variable
            max engine rpm: 2333
        prop diameter (ft): 6.8901

     Outputs:
              max prop rpm: 2723.18
                gear ratio:    0.86
                       Cp0: 0.071690
                       Ct0: 0.167038
       static thrust (lbs): 1844.08
-->

<propeller name="propeller_MTV-5-1-D-C-F-R(A)">
<!--  MTV-5-1/210-56 - real -->
   <ixx> 4.216 </ixx>
  <diameter unit="IN"> 82.7 </diameter>
  <numblades> 5 </numblades>
  <gearratio> 14.7783251232 </gearratio>
  <reversepitch> -20 </reversepitch>
  <minpitch> 0 </minpitch>
  <maxpitch> 80 </maxpitch>
  <minrpm> 1850 </minrpm>
  <maxrpm> 2250 </maxrpm>
  <constspeed> 1 </constspeed>
  <p_factor> 6.53 </p_factor>
 <ct_factor> 1.0 </ct_factor>
  <cp_factor> 1.0 </cp_factor>

 <!-- fantasie
   <ixx> 5.13 </ixx>
  <diameter unit="IN"> 82.7 </diameter>
  <numblades> 5 </numblades>
  <gearratio> 0.89 </gearratio>
  <reversepitch> -15 </reversepitch>
  <minpitch> 15 </minpitch>
  <maxpitch> 79 </maxpitch>
  <minrpm> 1850 </minrpm>
  <maxrpm> 2250 </maxrpm>
  <constspeed> 1 </constspeed>
  <p_factor> 6.53 </p_factor>
 <ct_factor> 4.0 </ct_factor>
  <cp_factor> 0.75 </cp_factor>
  -->

 <!-- thrust coefficient as a function of advance ratio and blade angle -->
  <table name="C_THRUST" type="internal">
      <tableData>
<!-- standart Aero-Matic v 1.1
                -10        0         15        25        35        45        55        65       90
      -0.2      -0.0816    0.0460    0.1673    0.2049    0.2258    0.2383    0.2196    0.1882   0.0000
       0.0      -0.1213    0.0000    0.1673    0.2049    0.2258    0.2405    0.2248    0.1882   0.0000
       0.2      -0.1360   -0.0418    0.1443    0.2007    0.2226    0.2405    0.2248    0.1882   0.0000
       0.4      -0.1360   -0.0972    0.1087    0.1987    0.2184    0.2383    0.2248    0.1882   0.0000
       0.6      -0.1360   -0.1360    0.0575    0.1788    0.2091    0.2321    0.2216    0.1882   0.0000
       0.8      -0.1360   -0.1360    0.0032    0.1338    0.2029    0.2238    0.2216    0.1882   0.0000
       1.0      -0.1360   -0.1360   -0.0544    0.0816    0.1945    0.2122    0.2196    0.1882   0.0000
       1.2      -0.1360   -0.1360   -0.1119    0.0251    0.1599    0.2049    0.2196    0.1882   0.0000
       1.4      -0.1360   -0.1360   -0.1360   -0.0366    0.1151    0.2017    0.2154    0.1882   0.0000
       1.6      -0.1360   -0.1360   -0.1360   -0.0930    0.0627    0.1945    0.2112    0.1882   0.0000
       1.8      -0.1360   -0.1360   -0.1360   -0.1360    0.0105    0.1673    0.2049    0.1882   0.0000
       2.0      -0.1360   -0.1360   -0.1360   -0.1360   -0.0418    0.1306    0.2040    0.1882   0.0000
       2.2      -0.1360   -0.1360   -0.1360   -0.1360   -0.0942    0.0942    0.2007    0.1882   0.0000
       2.4      -0.1360   -0.1360   -0.1360   -0.1360   -0.1360    0.0502    0.1639    0.1882   0.0000
       2.6      -0.1360   -0.1360   -0.1360   -0.1360   -0.1360    0.0064    0.1037    0.1673   0.0000
       2.8      -0.1360   -0.1360   -0.1360   -0.1360   -0.1360   -0.0376    0.0679    0.1360   0.0000
       3.0      -0.1360   -0.1360   -0.1360   -0.1360   -0.1360   -0.0816    0.0356    0.1045   0.0000
       3.2      -0.1360   -0.1360   -0.1360   -0.1360   -0.1360   -0.1254    0.0032    0.0733   0.0000
       3.4      -0.1360   -0.1360   -0.1360   -0.1360   -0.1360   -0.1360   -0.0293    0.0418   0.0000
       3.6      -0.1360   -0.1360   -0.1360   -0.1360   -0.1360   -0.1360   -0.0617    0.0105   0.0000
       3.8      -0.1360   -0.1360   -0.1360   -0.1360   -0.1360   -0.1360   -0.0942   -0.0209   0.0000
       4.0      -0.1360   -0.1360   -0.1360   -0.1360   -0.1360   -0.1360   -0.1264   -0.0523   0.0000
       6.0      -0.1360   -0.1360   -0.1360   -0.1360   -0.1360   -0.1360   -0.1360   -0.1360   0.0000
-->
<!-- fantasy
	-16	0	8	16	24	32	40	48	56	64	72	80
-0.2	0.0000	0.0199	0.0395	0.0546	0.0849	0.1157	0.1467	0.1778	0.2090	0.2402	0.2715	0.3028
0	-0.0395	-0.0199	0.0199	0.0507	0.0819	0.1133	0.1446	0.1760	0.2074	0.2389	0.2703	0.3017
0.2	-0.0761	-0.0583	0.0000	0.0405	0.0761	0.1092	0.1416	0.1736	0.2054	0.2371	0.2687	0.3003
0.4	-0.1081	-0.0927	-0.0199	0.0000	0.0607	0.1014	0.1365	0.1699	0.2025	0.2347	0.2667	0.2986
0.6	-0.1349	-0.1221	-0.0395	-0.0405	0.0000	0.0810	0.1268	0.1638	0.1982	0.2314	0.2641	0.2963
0.8	-0.1571	-0.1466	-0.0583	-0.0507	-0.0607	0.0000	0.1012	0.1521	0.1912	0.2265	0.2604	0.2934
1	-0.1752	-0.1666	-0.0761	-0.0546	-0.0761	-0.0810	0.0000	0.1215	0.1775	0.2185	0.2548	0.2893
1.2	-0.1901	-0.1830	-0.0927	-0.0566	-0.0819	-0.1014	-0.1012	0.0000	0.1417	0.2029	0.2458	0.2832
1.4	-0.2024	-0.1966	-0.1081	-0.0579	-0.0849	-0.1092	-0.1268	-0.1215	0.0000	0.1620	0.2282	0.2731
1.6	-0.2127	-0.2078	-0.1221	-0.0587	-0.0868	-0.1133	-0.1365	-0.1521	-0.1417	0.0000	0.1822	0.2536
1.8	-0.2214	-0.2173	-0.1349	-0.0593	-0.0880	-0.1157	-0.1416	-0.1638	-0.1775	-0.1620	0.0000	0.2024
2	-0.2288	-0.2253	-0.1466	-0.0597	-0.0889	-0.1174	-0.1446	-0.1699	-0.1912	-0.2029	-0.1822	0.0000
2.2	-0.2352	-0.2321	-0.1571	-0.0601	-0.0896	-0.1185	-0.1467	-0.1736	-0.1982	-0.2185	-0.2282	-0.2024
2.4	-0.2407	-0.2381	-0.1666	-0.0603	-0.0901	-0.1194	-0.1482	-0.1760	-0.2025	-0.2265	-0.2458	-0.2536
2.6	-0.2456	-0.2432	-0.1752	-0.0606	-0.0905	-0.1201	-0.1493	-0.1778	-0.2054	-0.2314	-0.2548	-0.2731
2.8	-0.2498	-0.2477	-0.1830	-0.0608	-0.0908	-0.1207	-0.1501	-0.1791	-0.2074	-0.2347	-0.2604	-0.2832
3	-0.2536	-0.2518	-0.1901	-0.0609	-0.0911	-0.1211	-0.1508	-0.1802	-0.2090	-0.2371	-0.2641	-0.2893
3.2	-0.2569	-0.2553	-0.1966	-0.0610	-0.0914	-0.1215	-0.1514	-0.1810	-0.2102	-0.2389	-0.2667	-0.2934
3.4	-0.2600	-0.2585	-0.2024	-0.0612	-0.0916	-0.1218	-0.1519	-0.1817	-0.2112	-0.2402	-0.2687	-0.2963
3.6	-0.2627	-0.2614	-0.2078	-0.0613	-0.0917	-0.1221	-0.1523	-0.1823	-0.2120	-0.2413	-0.2703	-0.2986
3.8	-0.2652	-0.2640	-0.2127	-0.0614	-0.0919	-0.1223	-0.1526	-0.1827	-0.2126	-0.2422	-0.2715	-0.3003
4	-0.2674	-0.2663	-0.2173	-0.0614	-0.0920	-0.1225	-0.1529	-0.1831	-0.2132	-0.2430	-0.2725	-0.3017
6	-0.2822	-0.2817	-0.2477	-0.0619	-0.0929	-0.1237	-0.1546	-0.1854	-0.2161	-0.2468	-0.2774	-0.3079
-->

<!-- MTV-5-1/210-56 - real
	0	5	10	15	20	25	30	35	40	45
0.0	0.073	0.135	0.19	0.234	0.248	0.248	0.244	0.238	0.232	0.222
0.1	0.063	0.125	0.184	0.23	0.248	0.249	0.244	0.239	0.232	0.222
0.2	0.042	0.105	0.169	0.222	0.248	0.25	0.245	0.241	0.233	0.223
0.3	0.02	0.08	0.15	0.21	0.245	0.253	0.248	0.243	0.235	0.224
0.4	-0.002	0.055	0.125	0.195	0.241	0.255	0.252	0.247	0.238	0.227
0.5	-0.024	0.025	0.097	0.17	0.232	0.256	0.256	0.25	0.242	0.231
0.6	-0.046	-0.005	0.065	0.145	0.217	0.256	0.26	0.256	0.248	0.236
0.7	-0.068	-0.035	0.03	0.112	0.193	0.25	0.264	0.261	0.253	0.242
0.8	-0.09	-0.065	-0.005	0.078	0.163	0.238	0.266	0.266	0.26	0.248
0.9	-0.112	-0.095	-0.04	0.04	0.13	0.215	0.265	0.272	0.265	0.255
1.0	-0.134	-0.125	-0.075	0	0.095	0.189	0.258	0.277	0.273	0.263
1.1	-0.156	-0.155	-0.11	-0.04	0.06	0.158	0.242	0.279	0.28	0.271
1.2	-0.178	-0.185	-0.145	-0.08	0.02	0.124	0.218	0.278	0.286	0.279
1.3	-0.2	-0.215	-0.18	-0.12	-0.02	0.088	0.19	0.27	0.291	0.287
1.4	-0.222	-0.245	-0.215	-0.16	-0.06	0.05	0.16	0.254	0.295	0.295
1.5	-0.244	-0.275	-0.25	-0.2	-0.1	0.01	0.125	0.232	0.293	0.302
1.6	-0.266	-0.305	-0.285	-0.24	-0.14	-0.03	0.09	0.205	0.288	0.308
1.7	-0.288	-0.335	-0.32	-0.28	-0.18	-0.07	0.055	0.175	0.275	0.312
1.8	-0.31	-0.365	-0.355	-0.32	-0.22	-0.11	0.015	0.145	0.258	0.315
1.9	-0.332	-0.395	-0.39	-0.36	-0.26	-0.15	-0.025	0.11	0.235	0.312
2.0	-0.354	-0.425	-0.425	-0.4	-0.3	-0.19	-0.065	0.075	0.21	0.307
2.1	-0.376	-0.455	-0.46	-0.44	-0.34	-0.23	-0.105	0.04	0.18	0.296
2.2	-0.398	-0.485	-0.495	-0.48	-0.38	-0.27	-0.145	0	0.15	0.28
2.3	-0.42	-0.515	-0.53	-0.52	-0.42	-0.31	-0.185	-0.04	0.12	0.261
2.4	-0.442	-0.545	-0.565	-0.56	-0.46	-0.35	-0.225	-0.08	0.09	0.24
2.5	-0.464	-0.575	-0.6	-0.6	-0.5	-0.39	-0.265	-0.12	0.06	0.219
2.6	-0.486	-0.605	-0.635	-0.64	-0.54	-0.43	-0.305	-0.16	0.03	0.198
2.7	-0.508	-0.635	-0.67	-0.68	-0.58	-0.47	-0.345	-0.2	0	0.177
2.8	-0.53	-0.665	-0.705	-0.72	-0.62	-0.51	-0.385	-0.24	-0.03	0.156
2.9	-0.552	-0.695	-0.74	-0.76	-0.66	-0.55	-0.425	-0.28	-0.06	0.135
3.0	-0.574	-0.725	-0.775	-0.8	-0.7	-0.59	-0.465	-0.32	-0.09	0.114
3.1	-0.596	-0.755	-0.81	-0.84	-0.74	-0.63	-0.505	-0.36	-0.12	0.093
3.2	-0.618	-0.785	-0.845	-0.88	-0.78	-0.67	-0.545	-0.4	-0.15	0.072
3.3	-0.64	-0.815	-0.88	-0.92	-0.82	-0.71	-0.585	-0.44	-0.18	0.051
3.4	-0.662	-0.845	-0.915	-0.96	-0.86	-0.75	-0.625	-0.48	-0.21	0.03
3.5	-0.684	-0.875	-0.95	-1	-0.9	-0.79	-0.665	-0.52	-0.24	0.009
3.6	-0.706	-0.905	-0.985	-1.04	-0.94	-0.83	-0.705	-0.56	-0.27	-0.012
3.7	-0.728	-0.935	-1.02	-1.08	-0.98	-0.87	-0.745	-0.6	-0.3	-0.033
3.8	-0.75	-0.965	-1.055	-1.12	-1.02	-0.91	-0.785	-0.64	-0.33	-0.054
3.9	-0.772	-0.995	-1.09	-1.16	-1.06	-0.95	-0.825	-0.68	-0.36	-0.075
4.0	-0.794	-1.025	-1.125	-1.2	-1.1	-0.99	-0.865	-0.72	-0.39	-0.096
4.1	-0.816	-1.055	-1.16	-1.24	-1.14	-1.03	-0.905	-0.76	-0.42	-0.117
-->

<!-- MTV-5-1/210-56 - real + fantasy      -->
	-20	-15	-10	-5	0	5	10	15	20	25	30	35	40	45
0.0	-0.222	-0.134	-0.046	-0.024	0.008	0.135	0.19	0.234	0.248	0.248	0.244	0.238	0.232	0.222
0.1	-0.244	-0.156	-0.068	-0.046	0.006	0.125	0.184	0.23	0.248	0.249	0.244	0.239	0.232	0.222
0.2	-0.266	-0.178	-0.09	-0.068	0.004	0.105	0.169	0.222	0.248	0.25	0.245	0.241	0.233	0.223
0.3	-0.288	-0.2	-0.112	-0.09	0.002	0.08	0.15	0.21	0.245	0.253	0.248	0.243	0.235	0.224
0.4	-0.31	-0.222	-0.134	-0.112	-0.002	0.055	0.125	0.195	0.241	0.255	0.252	0.247	0.238	0.227
0.5	-0.332	-0.244	-0.156	-0.134	-0.024	0.025	0.097	0.17	0.232	0.256	0.256	0.25	0.242	0.231
0.6	-0.354	-0.266	-0.178	-0.156	-0.046	-0.005	0.065	0.145	0.217	0.256	0.26	0.256	0.248	0.236
0.7	-0.376	-0.288	-0.2	-0.178	-0.068	-0.035	0.03	0.112	0.193	0.25	0.264	0.261	0.253	0.242
0.8	-0.398	-0.31	-0.222	-0.2	-0.09	-0.065	-0.005	0.078	0.163	0.238	0.266	0.266	0.26	0.248
0.9	-0.42	-0.332	-0.244	-0.222	-0.112	-0.095	-0.04	0.04	0.13	0.215	0.265	0.272	0.265	0.255
1.0	-0.442	-0.354	-0.266	-0.244	-0.134	-0.125	-0.075	0	0.095	0.189	0.258	0.277	0.273	0.263
1.1	-0.464	-0.376	-0.288	-0.266	-0.156	-0.155	-0.11	-0.04	0.06	0.158	0.242	0.279	0.28	0.271
1.2	-0.486	-0.398	-0.31	-0.288	-0.178	-0.185	-0.145	-0.08	0.02	0.124	0.218	0.278	0.286	0.279
1.3	-0.508	-0.42	-0.332	-0.31	-0.2	-0.215	-0.18	-0.12	-0.02	0.088	0.19	0.27	0.291	0.287
1.4	-0.53	-0.442	-0.354	-0.332	-0.222	-0.245	-0.215	-0.16	-0.06	0.05	0.16	0.254	0.295	0.295
1.5	-0.552	-0.464	-0.376	-0.354	-0.244	-0.275	-0.25	-0.2	-0.1	0.01	0.125	0.232	0.293	0.302
1.6	-0.574	-0.486	-0.398	-0.376	-0.266	-0.305	-0.285	-0.24	-0.14	-0.03	0.09	0.205	0.288	0.308
1.7	-0.596	-0.508	-0.42	-0.398	-0.288	-0.335	-0.32	-0.28	-0.18	-0.07	0.055	0.175	0.275	0.312
1.8	-0.618	-0.53	-0.442	-0.42	-0.31	-0.365	-0.355	-0.32	-0.22	-0.11	0.015	0.145	0.258	0.315
1.9	-0.64	-0.552	-0.464	-0.442	-0.332	-0.395	-0.39	-0.36	-0.26	-0.15	-0.025	0.11	0.235	0.312
2.0	-0.662	-0.574	-0.486	-0.464	-0.354	-0.425	-0.425	-0.4	-0.3	-0.19	-0.065	0.075	0.21	0.307
2.1	-0.684	-0.596	-0.508	-0.486	-0.376	-0.455	-0.46	-0.44	-0.34	-0.23	-0.105	0.04	0.18	0.296
2.2	-0.706	-0.618	-0.53	-0.508	-0.398	-0.485	-0.495	-0.48	-0.38	-0.27	-0.145	0	0.15	0.28
2.3	-0.728	-0.64	-0.552	-0.53	-0.42	-0.515	-0.53	-0.52	-0.42	-0.31	-0.185	-0.04	0.12	0.261
2.4	-0.75	-0.662	-0.574	-0.552	-0.442	-0.545	-0.565	-0.56	-0.46	-0.35	-0.225	-0.08	0.09	0.24
2.5	-0.772	-0.684	-0.596	-0.574	-0.464	-0.575	-0.6	-0.6	-0.5	-0.39	-0.265	-0.12	0.06	0.219
2.6	-0.794	-0.706	-0.618	-0.596	-0.486	-0.605	-0.635	-0.64	-0.54	-0.43	-0.305	-0.16	0.03	0.198
2.7	-0.816	-0.728	-0.64	-0.618	-0.508	-0.635	-0.67	-0.68	-0.58	-0.47	-0.345	-0.2	0	0.177
2.8	-0.838	-0.75	-0.662	-0.64	-0.53	-0.665	-0.705	-0.72	-0.62	-0.51	-0.385	-0.24	-0.03	0.156
2.9	-0.86	-0.772	-0.684	-0.662	-0.552	-0.695	-0.74	-0.76	-0.66	-0.55	-0.425	-0.28	-0.06	0.135
3.0	-0.882	-0.794	-0.706	-0.684	-0.574	-0.725	-0.775	-0.8	-0.7	-0.59	-0.465	-0.32	-0.09	0.114
3.1	-0.904	-0.816	-0.728	-0.706	-0.596	-0.755	-0.81	-0.84	-0.74	-0.63	-0.505	-0.36	-0.12	0.093
3.2	-0.926	-0.838	-0.75	-0.728	-0.618	-0.785	-0.845	-0.88	-0.78	-0.67	-0.545	-0.4	-0.15	0.072
3.3	-0.948	-0.86	-0.772	-0.75	-0.64	-0.815	-0.88	-0.92	-0.82	-0.71	-0.585	-0.44	-0.18	0.051
3.4	-0.97	-0.882	-0.794	-0.772	-0.662	-0.845	-0.915	-0.96	-0.86	-0.75	-0.625	-0.48	-0.21	0.03
3.5	-0.992	-0.904	-0.816	-0.794	-0.684	-0.875	-0.95	-1	-0.9	-0.79	-0.665	-0.52	-0.24	0.009
3.6	-1.014	-0.926	-0.838	-0.816	-0.706	-0.905	-0.985	-1.04	-0.94	-0.83	-0.705	-0.56	-0.27	-0.012
3.7	-1.036	-0.948	-0.86	-0.838	-0.728	-0.935	-1.02	-1.08	-0.98	-0.87	-0.745	-0.6	-0.3	-0.033
3.8	-1.058	-0.97	-0.882	-0.86	-0.75	-0.965	-1.055	-1.12	-1.02	-0.91	-0.785	-0.64	-0.33	-0.054
3.9	-1.08	-0.992	-0.904	-0.882	-0.772	-0.995	-1.09	-1.16	-1.06	-0.95	-0.825	-0.68	-0.36	-0.075
4.0	-1.102	-1.014	-0.926	-0.904	-0.794	-1.025	-1.125	-1.2	-1.1	-0.99	-0.865	-0.72	-0.39	-0.096
4.1	-1.124	-1.036	-0.948	-0.926	-0.816	-1.055	-1.16	-1.24	-1.14	-1.03	-0.905	-0.76	-0.42	-0.117


<!-- MTV-5-1/210-56 - real + fantasy fps test
	-20	-15	-10	-5	0	5	10	15	20	25	30	35	40	45
0.0	-0.222	-0.134	-0.046	0.042	0.073	0.135	0.19	0.234	0.248	0.248	0.244	0.238	0.232	0.222
0.2	-0.266	-0.178	-0.09	-0.002	0.042	0.105	0.169	0.222	0.248	0.25	0.245	0.241	0.233	0.223
0.4	-0.31	-0.222	-0.134	-0.046	-0.002	0.055	0.125	0.195	0.241	0.255	0.252	0.247	0.238	0.227
0.6	-0.354	-0.266	-0.178	-0.09	-0.046	-0.005	0.065	0.145	0.217	0.256	0.26	0.256	0.248	0.236
0.8	-0.398	-0.31	-0.222	-0.134	-0.09	-0.065	-0.005	0.078	0.163	0.238	0.266	0.266	0.26	0.248
1.0	-0.442	-0.354	-0.266	-0.178	-0.134	-0.125	-0.075	0	0.095	0.189	0.258	0.277	0.273	0.263
1.2	-0.486	-0.398	-0.31	-0.222	-0.178	-0.185	-0.145	-0.08	0.02	0.124	0.218	0.278	0.286	0.279
1.4	-0.53	-0.442	-0.354	-0.266	-0.222	-0.245	-0.215	-0.16	-0.06	0.05	0.16	0.254	0.295	0.295
1.6	-0.574	-0.486	-0.398	-0.31	-0.266	-0.305	-0.285	-0.24	-0.14	-0.03	0.09	0.205	0.288	0.308
1.8	-0.618	-0.53	-0.442	-0.354	-0.31	-0.365	-0.355	-0.32	-0.22	-0.11	0.015	0.145	0.258	0.315
2.0	-0.662	-0.574	-0.486	-0.398	-0.354	-0.425	-0.425	-0.4	-0.3	-0.19	-0.065	0.075	0.21	0.307
2.2	-0.706	-0.618	-0.53	-0.442	-0.398	-0.485	-0.495	-0.48	-0.38	-0.27	-0.145	0	0.15	0.28
2.4	-0.75	-0.662	-0.574	-0.486	-0.442	-0.545	-0.565	-0.56	-0.46	-0.35	-0.225	-0.08	0.09	0.24
2.6	-0.794	-0.706	-0.618	-0.53	-0.486	-0.605	-0.635	-0.64	-0.54	-0.43	-0.305	-0.16	0.03	0.198
2.8	-0.838	-0.75	-0.662	-0.574	-0.53	-0.665	-0.705	-0.72	-0.62	-0.51	-0.385	-0.24	-0.03	0.156
3.0	-0.882	-0.794	-0.706	-0.618	-0.574	-0.725	-0.775	-0.8	-0.7	-0.59	-0.465	-0.32	-0.09	0.114
3.2	-0.926	-0.838	-0.75	-0.662	-0.618	-0.785	-0.845	-0.88	-0.78	-0.67	-0.545	-0.4	-0.15	0.072
3.4	-0.97	-0.882	-0.794	-0.706	-0.662	-0.845	-0.915	-0.96	-0.86	-0.75	-0.625	-0.48	-0.21	0.03
3.6	-1.014	-0.926	-0.838	-0.75	-0.706	-0.905	-0.985	-1.04	-0.94	-0.83	-0.705	-0.56	-0.27	-0.012
3.8	-1.058	-0.97	-0.882	-0.794	-0.75	-0.965	-1.055	-1.12	-1.02	-0.91	-0.785	-0.64	-0.33	-0.054
4.0	-1.102	-1.014	-0.926	-0.838	-0.794	-1.025	-1.125	-1.2	-1.1	-0.99	-0.865	-0.72	-0.39	-0.096
4.2	-1.124	-1.036	-0.948	-0.86	-0.816	-1.055	-1.16	-1.24	-1.14	-1.03	-0.905	-0.76	-0.42	-0.117
       -->
      </tableData>
  </table>

   <!-- power coefficient as a function of advance ratio and blade angle -->
  <table name="C_POWER" type="internal">
     <tableData>
<!--     standart Aero-Matic v 1.1
               -10        0        15        25        35        45        55        65       90
      -0.2      0.0120   0.0239    0.0838    0.1902    0.3280    0.4666    0.5384    0.5958   0.5958
       0.0      0.0479   0.0120    0.0718    0.1773    0.3137    0.4666    0.5405    0.5958   0.5958
       0.2      0.0682   0.0192    0.0694    0.1651    0.3000    0.4666    0.5405    0.5958   0.5958
       0.4      0.0919   0.0418    0.0598    0.1522    0.2850    0.4666    0.5405    0.5958   0.5958
       0.6      0.1127   0.0634    0.0395    0.1414    0.2670    0.4573    0.5384    0.5958   0.5958
       0.8      0.1328   0.0849    0.0120    0.1199    0.2512    0.4364    0.5384    0.5958   0.5958
       1.0      0.1529   0.1055    0.0120    0.0840    0.2369    0.4142    0.5362    0.5958   0.5958
       1.2      0.1737   0.0843   -0.0395    0.0323    0.2096    0.3970    0.5326    0.5958   0.5958
       1.4      0.1938   0.1457   -0.0596   -0.0239    0.1615    0.3912    0.5262    0.5958   0.5958
       1.6      0.2139   0.1665   -0.0696   -0.0718    0.1019    0.3804    0.5147    0.5743   0.5958
       1.8      0.2347   0.1866   -0.0718   -0.1199    0.0299    0.3374    0.4989    0.5621   0.5958
       2.0      0.2548   0.2067   -0.0919   -0.1673   -0.0359    0.2871    0.4752    0.5506   0.5958
       2.2      0.2749   0.2275   -0.1127   -0.2153   -0.1077    0.2333    0.4608    0.5262   0.5958
       2.4      0.2957   0.2476   -0.1328   -0.2634   -0.1795    0.1665    0.4472    0.5147   0.5958
       2.6      0.3158   0.2677   -0.1529   -0.3108   -0.2275    0.0696    0.4364    0.4967   0.5958
       2.8      0.3359   0.2886   -0.1737   -0.3589   -0.2728   -0.0237    0.4271    0.4903   0.5958
       3.0      0.3568   0.3087   -0.1938   -0.4070   -0.3230   -0.1077    0.4127    0.4903   0.5958
       3.2      0.3769   0.3288   -0.2139   -0.4544   -0.3711   -0.1917    0.3862    0.4788   0.5958
       3.4      0.3970   0.3496   -0.2347   -0.5025   -0.4185   -0.2749    0.2993    0.4666   0.5958
       3.6      0.4178   0.3697   -0.2548   -0.5506   -0.4666   -0.3589    0.2103    0.4544   0.5958
       3.8      0.4379   0.3898   -0.2749   -0.5958   -0.5147   -0.4429    0.1170    0.4400   0.5958
       4.0      0.4580   0.4106   -0.2957   -0.5958   -0.5958   -0.5262    0.0237    0.4070   0.5958
       6.0      0.5958   0.5958   -0.5958   -0.5958   -0.5958   -0.5958   -0.5958   -0.3589   0.5958

     -->

<!-- fantasy
	-16	0	8	16	24	32	40	48	56	64	72	80
-0.2	0.0375	0.0000	0.0000	0.1219	0.1841	0.2157	0.2472	0.2787	0.3102	0.3417	0.3732	0.4046
0	0.1123	0.0899	0.0600	0.1203	0.1828	0.2147	0.2465	0.2781	0.3097	0.3413	0.3728	0.4043
0.2	0.1865	0.1791	0.1197	0.1168	0.1805	0.2132	0.2454	0.2773	0.3090	0.3407	0.3723	0.4038
0.4	0.2599	0.2671	0.1791	0.0999	0.1752	0.2106	0.2437	0.2761	0.3081	0.3399	0.3717	0.4033
0.6	0.3320	0.3533	0.2380	-0.0999	0.1499	0.2044	0.2407	0.2742	0.3068	0.3389	0.3708	0.4026
0.8	0.4025	0.4372	0.2961	-0.1168	-0.1499	0.1749	0.2336	0.2708	0.3046	0.3374	0.3697	0.4017
1	0.4713	0.5183	0.3533	-0.1203	-0.1752	-0.1749	0.1998	0.2628	0.3008	0.3351	0.3681	0.4005
1.2	0.5382	0.5964	0.4095	-0.1219	-0.1805	-0.2044	-0.1998	0.2248	0.2920	0.3309	0.3656	0.3988
1.4	0.6028	0.6713	0.4646	-0.1227	-0.1828	-0.2106	-0.2336	-0.2248	0.2498	0.3212	0.3610	0.3960
1.6	0.6652	0.7427	0.5183	-0.1232	-0.1841	-0.2132	-0.2407	-0.2628	-0.2498	0.2748	0.3504	0.3911
1.8	0.7252	0.8106	0.5708	-0.1236	-0.1849	-0.2147	-0.2437	-0.2708	-0.2920	-0.2748	0.2998	0.3796
2	0.7828	0.8751	0.6218	-0.1239	-0.1854	-0.2157	-0.2454	-0.2742	-0.3008	-0.3212	-0.2998	0.3248
2.2	0.8379	0.9360	0.6713	-0.1241	-0.1858	-0.2163	-0.2465	-0.2761	-0.3046	-0.3309	-0.3504	-0.3248
2.4	0.8906	0.9936	0.7193	-0.1243	-0.1861	-0.2168	-0.2472	-0.2773	-0.3068	-0.3351	-0.3610	-0.3796
2.6	0.9410	1.0480	0.7657	-0.1244	-0.1864	-0.2172	-0.2478	-0.2781	-0.3081	-0.3374	-0.3656	-0.3911
2.8	0.9890	1.0992	0.8106	-0.1245	-0.1866	-0.2175	-0.2482	-0.2787	-0.3090	-0.3389	-0.3681	-0.3960
3	1.0347	1.1475	0.8540	-0.1246	-0.1868	-0.2177	-0.2485	-0.2792	-0.3097	-0.3399	-0.3697	-0.3988
3.2	1.0782	1.1929	0.8958	-0.1247	-0.1869	-0.2179	-0.2488	-0.2796	-0.3102	-0.3407	-0.3708	-0.4005
3.4	1.1197	1.2358	0.9360	-0.1247	-0.1870	-0.2180	-0.2490	-0.2799	-0.3107	-0.3413	-0.3717	-0.4017
3.6	1.1591	1.2761	0.9748	-0.1248	-0.1871	-0.2182	-0.2492	-0.2801	-0.3110	-0.3417	-0.3723	-0.4026
3.8	1.1966	1.3141	1.0121	-0.1249	-0.1872	-0.2183	-0.2494	-0.2803	-0.3113	-0.3421	-0.3728	-0.4033
4	1.2323	1.3499	1.0480	-0.1249	-0.1873	-0.2184	-0.2495	-0.2805	-0.3115	-0.3424	-0.3732	-0.4038
6	1.5076	1.6162	1.3382	-0.1252	-0.1877	-0.2190	-0.2502	-0.2815	-0.3127	-0.3439	-0.3750	-0.4062
 -->

<!-- MTV-5-1/210-56 - real
	0	5	10	15	20	25	30	35	40	45
0.0	0.030	0.060	0.095	0.135	0.160	0.196	0.240	0.301	0.380	0.475
0.1	0.028	0.059	0.095	0.137	0.163	0.198	0.240	0.299	0.375	0.465
0.2	0.025	0.054	0.093	0.139	0.171	0.200	0.242	0.297	0.370	0.458
0.3	0.020	0.046	0.090	0.140	0.181	0.210	0.245	0.298	0.363	0.450
0.4	0.011	0.036	0.082	0.138	0.190	0.220	0.253	0.300	0.361	0.442
0.5	0.000	0.021	0.070	0.132	0.195	0.235	0.262	0.308	0.363	0.440
0.6	-0.011	0.003	0.055	0.120	0.194	0.248	0.275	0.315	0.370	0.438
0.7	-0.022	-0.010	0.033	0.100	0.183	0.260	0.293	0.328	0.377	0.441
0.8	-0.033	-0.023	0.005	0.076	0.170	0.262	0.313	0.342	0.389	0.449
0.9	-0.044	-0.036	-0.023	0.047	0.148	0.255	0.331	0.362	0.403	0.458
1.0	-0.055	-0.049	-0.051	0.010	0.115	0.238	0.341	0.387	0.422	0.472
1.1	-0.066	-0.062	-0.079	-0.030	0.080	0.210	0.339	0.412	0.448	0.492
1.2	-0.077	-0.075	-0.107	-0.070	0.038	0.170	0.321	0.430	0.474	0.515
1.3	-0.088	-0.088	-0.135	-0.110	-0.004	0.130	0.295	0.440	0.500	0.541
1.4	-0.099	-0.101	-0.163	-0.150	-0.046	0.080	0.260	0.438	0.530	0.570
1.5	-0.110	-0.114	-0.191	-0.190	-0.088	0.024	0.215	0.418	0.555	0.608
1.6	-0.121	-0.127	-0.219	-0.230	-0.130	-0.032	0.165	0.383	0.568	0.640
1.7	-0.132	-0.140	-0.247	-0.270	-0.172	-0.088	0.108	0.342	0.568	0.678
1.8	-0.143	-0.153	-0.275	-0.310	-0.214	-0.144	0.045	0.295	0.553	0.710
1.9	-0.154	-0.166	-0.303	-0.350	-0.256	-0.200	-0.018	0.240	0.525	0.738
2.0	-0.165	-0.179	-0.331	-0.390	-0.298	-0.256	-0.081	0.175	0.484	0.753
2.1	-0.176	-0.192	-0.359	-0.430	-0.340	-0.312	-0.144	0.110	0.438	0.755
2.2	-0.187	-0.205	-0.387	-0.470	-0.382	-0.368	-0.207	0.035	0.380	0.740
2.3	-0.198	-0.218	-0.415	-0.510	-0.424	-0.424	-0.270	-0.040	0.320	0.715
2.4	-0.209	-0.231	-0.443	-0.550	-0.466	-0.480	-0.333	-0.115	0.250	0.675
2.5	-0.220	-0.244	-0.471	-0.590	-0.508	-0.536	-0.396	-0.190	0.180	0.635
2.6	-0.231	-0.257	-0.499	-0.630	-0.550	-0.592	-0.459	-0.265	0.110	0.595
2.7	-0.242	-0.270	-0.527	-0.670	-0.592	-0.648	-0.522	-0.340	0.040	0.555
2.8	-0.253	-0.283	-0.555	-0.710	-0.634	-0.704	-0.585	-0.415	-0.030	0.515
2.9	-0.264	-0.296	-0.583	-0.750	-0.676	-0.760	-0.648	-0.490	-0.100	0.475
3.0	-0.275	-0.309	-0.611	-0.790	-0.718	-0.816	-0.711	-0.565	-0.170	0.435
3.1	-0.286	-0.322	-0.639	-0.830	-0.760	-0.872	-0.774	-0.640	-0.240	0.395
3.2	-0.297	-0.335	-0.667	-0.870	-0.802	-0.928	-0.837	-0.715	-0.310	0.355
3.3	-0.308	-0.348	-0.695	-0.910	-0.844	-0.984	-0.900	-0.790	-0.380	0.315
3.4	-0.319	-0.361	-0.723	-0.950	-0.886	-1.040	-0.963	-0.865	-0.450	0.275
3.5	-0.330	-0.374	-0.751	-0.990	-0.928	-1.096	-1.026	-0.940	-0.520	0.235
3.6	-0.341	-0.387	-0.779	-1.030	-0.970	-1.152	-1.089	-1.015	-0.590	0.195
3.7	-0.352	-0.400	-0.807	-1.070	-1.012	-1.208	-1.152	-1.090	-0.660	0.155
3.8	-0.363	-0.413	-0.835	-1.110	-1.054	-1.264	-1.215	-1.165	-0.730	0.115
3.9	-0.374	-0.426	-0.863	-1.150	-1.096	-1.320	-1.278	-1.240	-0.800	0.075
4.0	-0.385	-0.439	-0.891	-1.190	-1.138	-1.376	-1.341	-1.315	-0.870	0.035
4.1	-0.396	-0.452	-0.919	-1.230	-1.180	-1.432	-1.404	-1.390	-0.940	-0.005
-->

<!-- MTV-5-1/210-56 - real + fantasy
	-20	-15	-10	-5	0	5	10	15	20	25	30	35	40	45
0.0	0.16	0.135	0.095	0.06	0.030	0.060	0.095	0.135	0.160	0.196	0.240	0.301	0.380	0.475
0.1	0.163	0.137	0.095	0.059	0.028	0.059	0.095	0.137	0.163	0.198	0.240	0.299	0.375	0.465
0.2	0.171	0.139	0.093	0.054	0.025	0.054	0.093	0.139	0.171	0.200	0.242	0.297	0.370	0.458
0.3	0.181	0.14	0.09	0.046	0.020	0.046	0.090	0.140	0.181	0.210	0.245	0.298	0.363	0.450
0.4	0.19	0.138	0.082	0.036	0.011	0.036	0.082	0.138	0.190	0.220	0.253	0.300	0.361	0.442
0.5	0.195	0.132	0.07	0.021	0.000	0.021	0.070	0.132	0.195	0.235	0.262	0.308	0.363	0.440
0.6	0.194	0.12	0.055	0.003	-0.011	0.003	0.055	0.120	0.194	0.248	0.275	0.315	0.370	0.438
0.7	0.183	0.1	0.033	-0.01	-0.022	-0.010	0.033	0.100	0.183	0.260	0.293	0.328	0.377	0.441
0.8	0.17	0.076	0.005	-0.023	-0.033	-0.023	0.005	0.076	0.170	0.262	0.313	0.342	0.389	0.449
0.9	0.148	0.047	-0.023	-0.036	-0.044	-0.036	-0.023	0.047	0.148	0.255	0.331	0.362	0.403	0.458
1.0	0.115	0.01	-0.051	-0.049	-0.055	-0.049	-0.051	0.010	0.115	0.238	0.341	0.387	0.422	0.472
1.1	0.08	-0.03	-0.079	-0.062	-0.066	-0.062	-0.079	-0.030	0.080	0.210	0.339	0.412	0.448	0.492
1.2	0.038	-0.07	-0.107	-0.075	-0.077	-0.075	-0.107	-0.070	0.038	0.170	0.321	0.430	0.474	0.515
1.3	-0.004	-0.11	-0.135	-0.088	-0.088	-0.088	-0.135	-0.110	-0.004	0.130	0.295	0.440	0.500	0.541
1.4	-0.046	-0.15	-0.163	-0.101	-0.099	-0.101	-0.163	-0.150	-0.046	0.080	0.260	0.438	0.530	0.570
1.5	-0.088	-0.19	-0.191	-0.114	-0.110	-0.114	-0.191	-0.190	-0.088	0.024	0.215	0.418	0.555	0.608
1.6	-0.13	-0.23	-0.219	-0.127	-0.121	-0.127	-0.219	-0.230	-0.130	-0.032	0.165	0.383	0.568	0.640
1.7	-0.172	-0.27	-0.247	-0.14	-0.132	-0.140	-0.247	-0.270	-0.172	-0.088	0.108	0.342	0.568	0.678
1.8	-0.214	-0.31	-0.275	-0.153	-0.143	-0.153	-0.275	-0.310	-0.214	-0.144	0.045	0.295	0.553	0.710
1.9	-0.256	-0.35	-0.303	-0.166	-0.154	-0.166	-0.303	-0.350	-0.256	-0.200	-0.018	0.240	0.525	0.738
2.0	-0.298	-0.39	-0.331	-0.179	-0.165	-0.179	-0.331	-0.390	-0.298	-0.256	-0.081	0.175	0.484	0.753
2.1	-0.34	-0.43	-0.359	-0.192	-0.176	-0.192	-0.359	-0.430	-0.340	-0.312	-0.144	0.110	0.438	0.755
2.2	-0.382	-0.47	-0.387	-0.205	-0.187	-0.205	-0.387	-0.470	-0.382	-0.368	-0.207	0.035	0.380	0.740
2.3	-0.424	-0.51	-0.415	-0.218	-0.198	-0.218	-0.415	-0.510	-0.424	-0.424	-0.270	-0.040	0.320	0.715
2.4	-0.466	-0.55	-0.443	-0.231	-0.209	-0.231	-0.443	-0.550	-0.466	-0.480	-0.333	-0.115	0.250	0.675
2.5	-0.508	-0.59	-0.471	-0.244	-0.220	-0.244	-0.471	-0.590	-0.508	-0.536	-0.396	-0.190	0.180	0.635
2.6	-0.55	-0.63	-0.499	-0.257	-0.231	-0.257	-0.499	-0.630	-0.550	-0.592	-0.459	-0.265	0.110	0.595
2.7	-0.592	-0.67	-0.527	-0.27	-0.242	-0.270	-0.527	-0.670	-0.592	-0.648	-0.522	-0.340	0.040	0.555
2.8	-0.634	-0.71	-0.555	-0.283	-0.253	-0.283	-0.555	-0.710	-0.634	-0.704	-0.585	-0.415	-0.030	0.515
2.9	-0.676	-0.75	-0.583	-0.296	-0.264	-0.296	-0.583	-0.750	-0.676	-0.760	-0.648	-0.490	-0.100	0.475
3.0	-0.718	-0.79	-0.611	-0.309	-0.275	-0.309	-0.611	-0.790	-0.718	-0.816	-0.711	-0.565	-0.170	0.435
3.1	-0.76	-0.83	-0.639	-0.322	-0.286	-0.322	-0.639	-0.830	-0.760	-0.872	-0.774	-0.640	-0.240	0.395
3.2	-0.802	-0.87	-0.667	-0.335	-0.297	-0.335	-0.667	-0.870	-0.802	-0.928	-0.837	-0.715	-0.310	0.355
3.3	-0.844	-0.91	-0.695	-0.348	-0.308	-0.348	-0.695	-0.910	-0.844	-0.984	-0.900	-0.790	-0.380	0.315
3.4	-0.886	-0.95	-0.723	-0.361	-0.319	-0.361	-0.723	-0.950	-0.886	-1.040	-0.963	-0.865	-0.450	0.275
3.5	-0.928	-0.99	-0.751	-0.374	-0.330	-0.374	-0.751	-0.990	-0.928	-1.096	-1.026	-0.940	-0.520	0.235
3.6	-0.97	-1.03	-0.779	-0.387	-0.341	-0.387	-0.779	-1.030	-0.970	-1.152	-1.089	-1.015	-0.590	0.195
3.7	-1.012	-1.07	-0.807	-0.4	-0.352	-0.400	-0.807	-1.070	-1.012	-1.208	-1.152	-1.090	-0.660	0.155
3.8	-1.054	-1.11	-0.835	-0.413	-0.363	-0.413	-0.835	-1.110	-1.054	-1.264	-1.215	-1.165	-0.730	0.115
3.9	-1.096	-1.15	-0.863	-0.426	-0.374	-0.426	-0.863	-1.150	-1.096	-1.320	-1.278	-1.240	-0.800	0.075
4.0	-1.138	-1.19	-0.891	-0.439	-0.385	-0.439	-0.891	-1.190	-1.138	-1.376	-1.341	-1.315	-0.870	0.035
4.1	-1.18	-1.23	-0.919	-0.452	-0.396	-0.452	-0.919	-1.230	-1.180	-1.432	-1.404	-1.390	-0.940	-0.005
-->

<!-- MTV-5-1/210-56 - real + fantasy fps test-->
	-20	-15	-10	-5	0	5	10	15	20	25	30	35	40	45
0.0	0.16	0.135	0.095	0.06	0.030	0.060	0.095	0.135	0.160	0.196	0.240	0.301	0.380	0.475
0.2	0.171	0.139	0.093	0.054	0.025	0.054	0.093	0.139	0.171	0.200	0.242	0.297	0.370	0.458
0.4	0.19	0.138	0.082	0.036	0.011	0.036	0.082	0.138	0.190	0.220	0.253	0.300	0.361	0.442
0.6	0.194	0.12	0.055	0.003	-0.011	0.003	0.055	0.120	0.194	0.248	0.275	0.315	0.370	0.438
0.8	0.17	0.076	0.005	-0.023	-0.033	-0.023	0.005	0.076	0.170	0.262	0.313	0.342	0.389	0.449
1.0	0.115	0.01	-0.051	-0.049	-0.055	-0.049	-0.051	0.010	0.115	0.238	0.341	0.387	0.422	0.472
1.2	0.038	-0.07	-0.107	-0.075	-0.077	-0.075	-0.107	-0.070	0.038	0.170	0.321	0.430	0.474	0.515
1.4	-0.046	-0.15	-0.163	-0.101	-0.099	-0.101	-0.163	-0.150	-0.046	0.080	0.260	0.438	0.530	0.570
1.6	-0.13	-0.23	-0.219	-0.127	-0.121	-0.127	-0.219	-0.230	-0.130	-0.032	0.165	0.383	0.568	0.640
1.8	-0.214	-0.31	-0.275	-0.153	-0.143	-0.153	-0.275	-0.310	-0.214	-0.144	0.045	0.295	0.553	0.710
2.0	-0.298	-0.39	-0.331	-0.179	-0.165	-0.179	-0.331	-0.390	-0.298	-0.256	-0.081	0.175	0.484	0.753
2.2	-0.382	-0.47	-0.387	-0.205	-0.187	-0.205	-0.387	-0.470	-0.382	-0.368	-0.207	0.035	0.380	0.740
2.4	-0.466	-0.55	-0.443	-0.231	-0.209	-0.231	-0.443	-0.550	-0.466	-0.480	-0.333	-0.115	0.250	0.675
2.6	-0.55	-0.63	-0.499	-0.257	-0.231	-0.257	-0.499	-0.630	-0.550	-0.592	-0.459	-0.265	0.110	0.595
2.8	-0.634	-0.71	-0.555	-0.283	-0.253	-0.283	-0.555	-0.710	-0.634	-0.704	-0.585	-0.415	-0.030	0.515
3.0	-0.718	-0.79	-0.611	-0.309	-0.275	-0.309	-0.611	-0.790	-0.718	-0.816	-0.711	-0.565	-0.170	0.435
3.2	-0.802	-0.87	-0.667	-0.335	-0.297	-0.335	-0.667	-0.870	-0.802	-0.928	-0.837	-0.715	-0.310	0.355
3.4	-0.886	-0.95	-0.723	-0.361	-0.319	-0.361	-0.723	-0.950	-0.886	-1.040	-0.963	-0.865	-0.450	0.275
3.6	-0.97	-1.03	-0.779	-0.387	-0.341	-0.387	-0.779	-1.030	-0.970	-1.152	-1.089	-1.015	-0.590	0.195
3.8	-1.054	-1.11	-0.835	-0.413	-0.363	-0.413	-0.835	-1.110	-1.054	-1.264	-1.215	-1.165	-0.730	0.115
4.0	-1.138	-1.19	-0.891	-0.439	-0.385	-0.439	-0.891	-1.190	-1.138	-1.376	-1.341	-1.315	-0.870	0.035
4.2	-1.18	-1.23	-0.919	-0.452	-0.396	-0.452	-0.919	-1.230	-1.180	-1.432	-1.404	-1.390	-0.940	-0.005


     </tableData>
  </table>


<!-- thrust effects of helical tip Mach -->
<table name="CT_MACH" type="internal">
  <tableData>
    0.85   1.0
    1.05   0.8
  </tableData>
</table>

<!-- power-required effects of helical tip Mach -->
<table name="CP_MACH" type="internal">
  <tableData>
    0.85   1.0
    1.05   1.8
    2.00   1.4
  </tableData>
</table>

</propeller>
