<?xml version="1.0"?>
<?xml-stylesheet type="text/xsl" href="http://jsbsim.sourceforge.net/JSBSim.xsl"?>
<fdm_config name="extra500" version="2.0" release="ALPHA"
xmlns:xsi="http://www.w3.org/2001/XMLSchema-instance"
	xsi:noNamespaceSchemaLocation="http://jsbsim.sourceforge.net/JSBSim.xsd">

	<fileheader>
		<author> Aeromatic v 0.95 </author>
		<filecreationdate>2013-03-13</filecreationdate>
		<version>$Revision: 0.0.1 $</version>
		<description> Models a extra500. </description>
	</fileheader>

	<!--
	File:     extra500.xml
	Inputs:
	name:          extra500
	type:          light single
	max weight:    2130 KG
	wing span:     38.0596 ft
	length:        33.23653 ft
	wing area:     unspecified
	gear type:     tricycle
	retractable?:  yes
	# engines:     1
	engine type:   turboprop
	engine layout: forward fuselage
	yaw damper?    yes
	Outputs:
	wing loading:  14.00 lb/sq-ft
	payload:       475.8 lbs
	CL-alpha:      5 per radian
	CL-0:          0.25
	CL-max:        1.4
	CD-0:          0.024
	K:             0.04

		-->

	<metrics>
		<wingarea  unit="M2">  14.025 </wingarea>
		<wingspan  unit="M" >  11.0 </wingspan>
		<wing_incidence>        2.00 </wing_incidence>
		<chord     unit="M" >   1.322 </chord>
		<htailarea unit="M2">   2.812 </htailarea>
		<htailarm  unit="M" >   5.562 </htailarm>
		<vtailarea unit="M2">   2.735 </vtailarea>
		<vtailarm  unit="M" >   4.736 </vtailarm>
		<location name="AERORP" unit="M">
			<x> 3.5305 </x>
			<y> 0.00 </y>
			<z> 2.40 </z>
		</location>
		<location name="EYEPOINT" unit="IN">
			<x>  45.393 </x>
			<y> -26.00 </y>
			<z>  80 </z>
		</location>
		<location name="VRP" unit="M">
			<x>3.146</x>
			<y>0</y>
			<z>1.98</z>
		</location>
	</metrics>

	<mass_balance>
		<documentation>
			The Center of Gravity location, empty weight, in aircraft's own
			structural coord system.
		</documentation>

		<!--
			max weight 		:	2130	KG
			max emtpy		:	1445	KG
			max fuel		:	553.3	KG
			max pax			:	500	KG
		-->

		<ixx unit="SLUG*FT2">      2891 </ixx>
		<iyy unit="SLUG*FT2">      3919 </iyy>
		<izz unit="SLUG*FT2">      6136 </izz>
		<emptywt unit="KG" >      1445 </emptywt>
		<location name="CG" unit="M">
			<x> 3.65 </x>
			<y> 0.00 </y>
			<z> 1.8 </z>
		</location>
		<pointmass name="Pilot">
			<weight unit="KG"> 80 </weight>
			<location name="POINTMASS" unit="M">
				<x> 2.977 </x>
				<y> -0.42 </y>
				<z> 1.8 </z>
			</location>
		</pointmass>
		<pointmass name="Co-Pilot">
			<weight unit="KG"> 80 </weight>
			<location name="POINTMASS" unit="M">
				<x> 2.977 </x>
				<y> 0.42 </y>
				<z> 1.8 </z>
			</location>
		</pointmass>
		<pointmass name="Row 1 Left Passenger">
			<weight unit="KG"> 0 </weight>
			<location name="POINTMASS" unit="M">
				<x> 3.93 </x>
				<y> -0.42 </y>
				<z> 1.80 </z>
			</location>
		</pointmass>
		<pointmass name="Row 1 Right Passenger">
			<weight unit="KG"> 0 </weight>
			<location name="POINTMASS" unit="M">
				<x> 3.93 </x>
				<y> 0.42 </y>
				<z> 1.80 </z>
			</location>
		</pointmass>
		<pointmass name="Row 2 Left Passenger">
			<weight unit="KG"> 0 </weight>
			<location name="POINTMASS" unit="M">
				<x> 5.05 </x>
				<y> -0.35 </y>
				<z> 1.80 </z>
			</location>
		</pointmass>
		<pointmass name="Row 2 Right Passenger">
			<weight unit="KG"> 0 </weight>
			<location name="POINTMASS" unit="M">
				<x> 5.05 </x>
				<y> 0.35 </y>
				<z> 1.80 </z>
			</location>
		</pointmass>
		<pointmass name="Baggage">
			<weight unit="KG"> 0 </weight>  <!--max 90kg -->
			<location name="POINTMASS" unit="M">
				<x> 5.75 </x>
				<y>  0 </y>
				<z> 1.6 </z>
			</location>
		</pointmass>
	</mass_balance>

	<ground_reactions>

		<contact type="BOGEY" name="NOSE">
			<location unit="M">
				<x>  1.416 </x>
				<y>  0.00 </y>
				<z>  0.05 </z>
			</location>
			<static_friction>  0.80 </static_friction>
			<dynamic_friction> 0.50 </dynamic_friction>
			<rolling_friction> 0.03 </rolling_friction>
			<spring_coeff unit="N/M">        40000 </spring_coeff>
			<damping_coeff unit="N/M/SEC">  34271.30 </damping_coeff>
			<max_steer unit="DEG"> 30 </max_steer>
			<brake_group>NONE</brake_group>
			<retractable>1</retractable>
		</contact>

		<contact type="BOGEY" name="LEFT_MAIN">
			<location unit="M">
				<x> 4.07 </x>
				<y> -1.06 </y>
				<z> 0.150 </z>
			</location>
			<static_friction>  0.80 </static_friction>
			<dynamic_friction> 0.50 </dynamic_friction>
			<rolling_friction> 0.03 </rolling_friction>
			<spring_coeff unit="N/M">        183000 </spring_coeff>
			<damping_coeff unit="N/M/SEC">  34271.30 </damping_coeff>
			<max_steer unit="DEG">0</max_steer>
			<brake_group>LEFT</brake_group>
			<retractable>1</retractable>
		</contact>

		<contact type="BOGEY" name="RIGHT_MAIN">
			<location unit="M">
				<x> 4.07 </x>
				<y>  1.06 </y>
				<z> 0.150 </z>
			</location>
			<static_friction>  0.80 </static_friction>
			<dynamic_friction> 0.50 </dynamic_friction>
			<rolling_friction> 0.03 </rolling_friction>
			<spring_coeff unit="N/M">        183000 </spring_coeff>
			<damping_coeff unit="N/M/SEC">  34271.30 </damping_coeff>
			<max_steer unit="DEG">0</max_steer>
			<brake_group>RIGHT</brake_group>
			<retractable>1</retractable>
		</contact>

		<contact type="STRUCTURE" name="LEFT_WING">
			<location unit="M">
				<x> 3.2 </x>
				<y> -6.3 </y>
				<z>  0.75 </z>
			</location>
			<static_friction>  1.00 </static_friction>
			<dynamic_friction> 1.00 </dynamic_friction>
			<spring_coeff unit="LBS/FT">   183000 </spring_coeff>
			<damping_coeff unit="LBS/FT/SEC">  18300 </damping_coeff>
		</contact>

		<contact type="STRUCTURE" name="RIGHT_WING">
			<location unit="M">
				<x> 3.2 </x>
				<y>  6.3 </y>
				<z>  0.75 </z>
			</location>
			<static_friction>  1.00 </static_friction>
			<dynamic_friction> 1.00 </dynamic_friction>
			<spring_coeff unit="LBS/FT">183000 </spring_coeff>
			<damping_coeff unit="LBS/FT/SEC">18300</damping_coeff>
		</contact>

		<contact type="STRUCTURE" name="VENTRAL FIN">
			<location unit="M">
				<x> 8.795 </x>
				<y> 0 </y>
				<z> 1.229 </z>
			</location>
			<static_friction>  1.00 </static_friction>
			<dynamic_friction> 1.00 </dynamic_friction>
			<spring_coeff unit="LBS/FT">183000</spring_coeff>
			<damping_coeff unit="LBS/FT/SEC">18300</damping_coeff>
		</contact>

	</ground_reactions>

	<propulsion>
		<engine file="turbine_250-B17F2">
			<location unit="IN">
				<x>   9.00 </x>
				<y>   0.00 </y>
				<z>   59.00 </z>
			</location>
			<orient unit="DEG">
				<pitch> -3.00 </pitch>
				<roll>  0.00 </roll>
				<yaw>   0.00 </yaw>
			</orient>
			<feed>3</feed>
			<thruster file="propeller_MTV-5-1-D-C-F-R(A)">
				<location unit="IN">
					<x>  9.00 </x>
					<y>   0.00 </y>
					<z>   59.00 </z>
				</location>
				<orient unit="DEG">
					<pitch> -3.00 </pitch>
					<roll>  0.00 </roll>
					<yaw>   0.00 </yaw>
				</orient>
			</thruster>
		</engine>
		<!--
			Tank
			collector + main + auxiliary = 553.3 KG
		-->
		<tank type="FUEL" number="0">
			<!-- left auxiliary compartment -->
			<location unit="M">
				<x>  3.9 </x>
				<y> -2.23 </y>
				<z>  2.357 </z>
			</location>
			<priority> 0 </priority>
			<type>JET-A</type>
			<capacity unit="KG"> 86.3 </capacity>
			<contents unit="KG"> 0.0 </contents>
		</tank>
		<tank type="FUEL" number="1">
			<!-- left main compartment -->
			<location unit="M">
				<x>  3.768 </x>
				<y> -1.42 </y>
				<z>  2.357 </z>
			</location>
			<priority> 0 </priority>
			<type>JET-A</type>
			<capacity unit="KG"> 160.0 </capacity>
			<contents unit="KG"> 160.0 </contents>
		</tank>
		<tank type="FUEL" number="2">
			<!-- left collector compartment -->
			<location unit="M">
				<x>  3.768 </x>
				<y> -0.82 </y>
				<z>  2.357 </z>
			</location>
			<priority> 0 </priority>
			<type>JET-A</type>
			<capacity unit="KG"> 30.4 </capacity>
			<contents unit="KG"> 30.4 </contents>
		</tank>
		<tank type="FUEL" number="3">
			<!-- Engine collector pipeline -->
			<location unit="M">
				<x> 0.4 </x>
				<y>   0.0 </y>
				<z>  0.0 </z>
			</location>
			<priority> 1 </priority>
			<type>JET-A</type>
			<capacity unit="KG"> 0.25 </capacity>
			<contents unit="KG"> 0.25 </contents>
		</tank>
		<tank type="FUEL" number="4">
			<!-- right collector compartment -->
			<location unit="M">
				<x>  3.768 </x>
				<y>  0.82 </y>
				<z>  2.357 </z>
			</location>
			<priority> 0 </priority>
			<type>JET-A</type>
			<capacity unit="KG"> 30.4 </capacity>
			<contents unit="KG"> 30.4 </contents>
		</tank>
		<tank type="FUEL" number="5">
			<!-- right main compartment -->
			<location unit="M">
				<x>  3.768 </x>
				<y>  1.42 </y>
				<z>  2.357 </z>
			</location>
			<priority> 0 </priority>
			<type>JET-A</type>
			<capacity unit="KG"> 160.0 </capacity>
			<contents unit="KG"> 160.0 </contents>
		</tank>
		<tank type="FUEL" number="6">
			<!-- right auxiliary compartment -->
			<location unit="M">
				<x>  3.9 </x>
				<y>  2.23 </y>
				<z>  2.357 </z>
			</location>
			<priority> 0 </priority>
			<type>JET-A</type>
			<capacity unit="KG"> 86.3 </capacity>
			<contents unit="KG"> 0.0 </contents>
		</tank>
	</propulsion>

	<flight_control name="FCS: extra500">

		<channel name="Pitch">

			<summer name="Pitch Trim Sum">
				<input>fcs/elevator-cmd-norm</input>
				<input>fcs/pitch-trim-cmd-norm</input>
				<clipto>
					<min> -1 </min>
					<max>  1 </max>
				</clipto>
			</summer>

			<aerosurface_scale name="Elevator Control">
				<input>fcs/pitch-trim-sum</input>
				<range>
					<min> -0.35 </min>
					<max>  0.35 </max>
				</range>
				<output>fcs/elevator-pos-rad</output>
			</aerosurface_scale>

			<aerosurface_scale name="elevator normalization">
				<input>fcs/elevator-pos-rad</input>
				<domain>
					<min> -0.35 </min>
					<max>  0.35 </max>
				</domain>
				<range>
					<min> -1 </min>
					<max>  1 </max>
				</range>
				<output>fcs/elevator-pos-norm</output>
			</aerosurface_scale>

		</channel>

		<channel name="Roll">

			<summer name="Roll Trim Sum">
				<input>fcs/aileron-cmd-norm</input>
				<input>fcs/roll-trim-cmd-norm</input>
				<clipto>
					<min> -1 </min>
					<max>  1 </max>
				</clipto>
			</summer>

			<aerosurface_scale name="Left Aileron Control">
				<input>fcs/roll-trim-sum</input>
				<range>
					<min> -0.35 </min>
					<max>  0.35 </max>
				</range>
				<output>fcs/left-aileron-pos-rad</output>
			</aerosurface_scale>

			<aerosurface_scale name="Right Aileron Control">
				<input>fcs/roll-trim-sum</input>
				<range>
					<min> -0.35 </min>
					<max>  0.35 </max>
				</range>
				<output>fcs/right-aileron-pos-rad</output>
			</aerosurface_scale>

			<aerosurface_scale name="left aileron normalization">
				<input>fcs/left-aileron-pos-rad</input>
				<domain>
					<min> -0.35 </min>
					<max>  0.35 </max>
				</domain>
				<range>
					<min> -1 </min>
					<max>  1 </max>
				</range>
				<output>fcs/left-aileron-pos-norm</output>
			</aerosurface_scale>

			<aerosurface_scale name="right aileron normalization">
				<input>fcs/right-aileron-pos-rad</input>
				<domain>
					<min> -0.35 </min>
					<max>  0.35 </max>
				</domain>
				<range>
					<min> -1 </min>
					<max>  1 </max>
				</range>
				<output>fcs/right-aileron-pos-norm</output>
			</aerosurface_scale>

		</channel>

		<property value="1">fcs/yaw-damper-enable</property>
		<channel name="Yaw">

			<summer name="Rudder Command Sum">
				<input>fcs/rudder-cmd-norm</input>
				<input>fcs/yaw-trim-cmd-norm</input>
				<clipto>
					<min> -1 </min>
					<max>  1 </max>
				</clipto>
			</summer>

			<scheduled_gain name="Yaw Damper Rate">
				<input>velocities/r-aero-rad_sec</input>
				<table>
					<independentVar lookup="row">velocities/ve-kts</independentVar>
					<tableData>
						30     0.00
						60     2.00
					</tableData>
				</table>
				<gain>fcs/yaw-damper-enable</gain>
			</scheduled_gain>

			<summer name="Rudder Sum">
				<input>fcs/rudder-command-sum</input>
				<input>fcs/yaw-damper-rate</input>
				<clipto>
					<min> -1.1 </min>
					<max>  1.1 </max>
				</clipto>
			</summer>

			<aerosurface_scale name="Rudder Control">
				<input>fcs/rudder-sum</input>
				<domain>
					<min> -1.1 </min>
					<max>  1.1 </max>
				</domain>
				<range>
					<min> -0.35 </min>
					<max>  0.35 </max>
				</range>
				<output>fcs/rudder-pos-rad</output>
			</aerosurface_scale>

			<aerosurface_scale name="rudder normalization">
				<input>fcs/rudder-pos-rad</input>
				<domain>
					<min> -0.35 </min>
					<max>  0.35 </max>
				</domain>
				<range>
					<min> -1 </min>
					<max>  1 </max>
				</range>
				<output>fcs/rudder-pos-norm</output>
			</aerosurface_scale>

		</channel>

		<channel name="Flaps">
			<kinematic name="Flaps Control">
				<input>fcs/flap-cmd-norm</input>
				<traverse>
					<setting>
						<position>  0 </position>
						<time>      0 </time>
					</setting>
					<setting>
						<position> 0.5 </position>
						<time>     3 </time>
					</setting>
					<setting>
						<position> 1 </position>
						<time>     5 </time>
					</setting>
				</traverse>
				<output>fcs/flap-pos-norm</output>
			</kinematic>

			<aerosurface_scale name="flap normalization">
				<input>fcs/flap-pos-norm</input>
				<domain>
					<min>  0 </min>
					<max> 1 </max>
				</domain>
				<range>
					<min> 0 </min>
					<max> 30 </max>
				</range>
				<output>fcs/flap-pos-deg</output>
			</aerosurface_scale>

		</channel>

		<channel name="Landing Gear">
			<kinematic name="Gear Control">
				<input>gear/gear-cmd-norm</input>
				<traverse>
					<setting>
						<position> 0 </position>
						<time>     0 </time>
					</setting>
					<setting>
						<position> 1 </position>
						<time>     5 </time>
					</setting>
				</traverse>
				<output>gear/gear-pos-norm</output>
			</kinematic>

		</channel>

		<channel name="Speedbrake">
			<kinematic name="Speedbrake Control">
				<input>fcs/speedbrake-cmd-norm</input>
				<traverse>
					<setting>
						<position> 0 </position>
						<time>     0 </time>
					</setting>
					<setting>
						<position> 1 </position>
						<time>     1 </time>
					</setting>
				</traverse>
				<output>fcs/speedbrake-pos-norm</output>
			</kinematic>

		</channel>

	</flight_control>

	<aerodynamics>

		<axis name="LIFT">

			<function name="aero/force/Lift_alpha">
				<description>Lift due to alpha</description>
				<product>
					<property>aero/qbar-psf</property>
					<property>metrics/Sw-sqft</property>
					<table>
						<independentVar lookup="row">aero/alpha-rad</independentVar>
						<tableData>
							-0.20 -0.750
							0.00  0.250
							0.23  1.400
							0.60  0.710
						</tableData>
					</table>
				</product>
			</function>

			<function name="aero/force/Lift_flap">
				<description>Delta Lift due to flaps</description>
				<product>
					<property>aero/qbar-psf</property>
					<property>metrics/Sw-sqft</property>
					<property>fcs/flap-pos-deg</property>
					<value> 0.01333 </value>
				</product>
			</function>

			<function name="aero/force/Lift_speedbrake">
				<description>Delta Lift due to speedbrake</description>
				<product>
					<property>aero/qbar-psf</property>
					<property>metrics/Sw-sqft</property>
					<property>fcs/speedbrake-pos-norm</property>
					<value>0</value>
				</product>
			</function>

			<function name="aero/force/Lift_elevator">
				<description>Lift due to Elevator Deflection</description>
				<product>
					<property>aero/qbar-psf</property>
					<property>metrics/Sw-sqft</property>
					<property>fcs/elevator-pos-rad</property>
					<value>0.2</value>
				</product>
			</function>

		</axis>

		<axis name="DRAG">

			<function name="aero/force/Drag_basic">
				<description>Drag at zero lift</description>
				<product>
					<property>aero/qbar-psf</property>
					<property>metrics/Sw-sqft</property>
					<table>
						<independentVar lookup="row">aero/alpha-rad</independentVar>
						<tableData>
							-1.57    1.500
							-0.26    0.031
							0.00    0.024
							0.26    0.031
							1.57    1.500
						</tableData>
					</table>
				</product>
			</function>

			<function name="aero/force/Drag_induced">
				<description>Induced drag</description>
				<product>
					<property>aero/qbar-psf</property>
					<property>metrics/Sw-sqft</property>
					<property>aero/cl-squared</property>
					<value>0.04</value>
				</product>
			</function>

			<function name="aero/force/Drag_mach">
				<description>Drag due to mach</description>
				<product>
					<property>aero/qbar-psf</property>
					<property>metrics/Sw-sqft</property>
					<table>
						<independentVar lookup="row">velocities/mach</independentVar>
						<tableData>
							0.00      0.000
							0.7      0.000
							1.10      0.023
							1.80      0.015
						</tableData>
					</table>
				</product>
			</function>

			<function name="aero/force/Drag_flap">
				<description>Drag due to flaps</description>
				<product>
					<property>aero/qbar-psf</property>
					<property>metrics/Sw-sqft</property>
					<property>fcs/flap-pos-deg</property>
					<value> 0.00100 </value>
				</product>
			</function>

			<function name="aero/force/Drag_gear">
				<description>Drag due to gear</description>
				<product>
					<property>aero/qbar-psf</property>
					<property>metrics/Sw-sqft</property>
					<property>gear/gear-pos-norm</property>
					<value>0.03</value>
				</product>
			</function>

			<function name="aero/force/Drag_speedbrake">
				<description>Drag due to speedbrakes</description>
				<product>
					<property>aero/qbar-psf</property>
					<property>metrics/Sw-sqft</property>
					<property>fcs/speedbrake-pos-norm</property>
					<value>0.024</value>
				</product>
			</function>

			<function name="aero/force/Drag_beta">
				<description>Drag due to sideslip</description>
				<product>
					<property>aero/qbar-psf</property>
					<property>metrics/Sw-sqft</property>
					<table>
						<independentVar lookup="row">aero/beta-rad</independentVar>
						<tableData>
							-1.57    1.230
							-0.26    0.050
							0.00    0.000
							0.26    0.050
							1.57    1.230
						</tableData>
					</table>
				</product>
			</function>

			<function name="aero/force/Drag_elevator">
				<description>Drag due to Elevator Deflection</description>
				<product>
					<property>aero/qbar-psf</property>
					<property>metrics/Sw-sqft</property>
					<abs>
						<property>fcs/elevator-pos-norm</property>
					</abs>
					<value>0.04</value>
				</product>
			</function>

		</axis>

		<axis name="SIDE">

			<function name="aero/force/Side_beta">
				<description>Side force due to beta</description>
				<product>
					<property>aero/qbar-psf</property>
					<property>metrics/Sw-sqft</property>
					<property>aero/beta-rad</property>
					<value>-1</value>
				</product>
			</function>

		</axis>

		<axis name="ROLL">

			<function name="aero/moment/Roll_beta">
				<description>Roll moment due to beta</description>
				<product>
					<property>aero/qbar-psf</property>
					<property>metrics/Sw-sqft</property>
					<property>metrics/bw-ft</property>
					<property>aero/beta-rad</property>
					<value>-0.1</value>
				</product>
			</function>

			<function name="aero/moment/Roll_damp">
				<description>Roll moment due to roll rate</description>
				<product>
					<property>aero/qbar-psf</property>
					<property>metrics/Sw-sqft</property>
					<property>metrics/bw-ft</property>
					<property>aero/bi2vel</property>
					<property>velocities/p-aero-rad_sec</property>
					<value>-0.4</value>
				</product>
			</function>

			<function name="aero/moment/Roll_yaw">
				<description>Roll moment due to yaw rate</description>
				<product>
					<property>aero/qbar-psf</property>
					<property>metrics/Sw-sqft</property>
					<property>metrics/bw-ft</property>
					<property>aero/bi2vel</property>
					<property>velocities/r-aero-rad_sec</property>
					<value>0.15</value>
				</product>
			</function>

			<function name="aero/moment/Roll_aileron">
				<description>Roll moment due to aileron</description>
				<product>
					<property>aero/qbar-psf</property>
					<property>metrics/Sw-sqft</property>
					<property>metrics/bw-ft</property>
					<property>fcs/left-aileron-pos-rad</property>
					<value>0.17</value>
				</product>
			</function>

			<function name="aero/moment/Roll_rudder">
				<description>Roll moment due to rudder</description>
				<product>
					<property>aero/qbar-psf</property>
					<property>metrics/Sw-sqft</property>
					<property>metrics/bw-ft</property>
					<property>fcs/rudder-pos-rad</property>
					<value>0.01</value>
				</product>
			</function>

		</axis>

		<axis name="PITCH">

			<function name="aero/moment/Pitch_alpha">
				<description>Pitch moment due to alpha</description>
				<product>
					<property>aero/qbar-psf</property>
					<property>metrics/Sw-sqft</property>
					<property>metrics/cbarw-ft</property>
					<property>aero/alpha-rad</property>
					<value>-0.5</value>
				</product>
			</function>

			<function name="aero/moment/Pitch_elevator">
				<description>Pitch moment due to elevator</description>
				<product>
					<property>aero/qbar-psf</property>
					<property>metrics/Sw-sqft</property>
					<property>metrics/cbarw-ft</property>
					<property>fcs/elevator-pos-rad</property>
					<table>
						<independentVar lookup="row">velocities/mach</independentVar>
						<tableData>
							0.0     -1.100
							2.0     -0.275
						</tableData>
					</table>
				</product>
			</function>

			<function name="aero/moment/Pitch_damp">
				<description>Pitch moment due to pitch rate</description>
				<product>
					<property>aero/qbar-psf</property>
					<property>metrics/Sw-sqft</property>
					<property>metrics/cbarw-ft</property>
					<property>aero/ci2vel</property>
					<property>velocities/q-aero-rad_sec</property>
					<value>-12</value>
				</product>
			</function>

			<function name="aero/moment/Pitch_alphadot">
				<description>Pitch moment due to alpha rate</description>
				<product>
					<property>aero/qbar-psf</property>
					<property>metrics/Sw-sqft</property>
					<property>metrics/cbarw-ft</property>
					<property>aero/ci2vel</property>
					<property>aero/alphadot-rad_sec</property>
					<value>-7</value>
				</product>
			</function>

		</axis>

		<axis name="YAW">

			<function name="aero/moment/Yaw_beta">
				<description>Yaw moment due to beta</description>
				<product>
					<property>aero/qbar-psf</property>
					<property>metrics/Sw-sqft</property>
					<property>metrics/bw-ft</property>
					<property>aero/beta-rad</property>
					<value>0.12</value>
				</product>
			</function>

			<function name="aero/moment/Yaw_damp">
				<description>Yaw moment due to yaw rate</description>
				<product>
					<property>aero/qbar-psf</property>
					<property>metrics/Sw-sqft</property>
					<property>metrics/bw-ft</property>
					<property>aero/bi2vel</property>
					<property>velocities/r-aero-rad_sec</property>
					<value>-0.15</value>
				</product>
			</function>

			<function name="aero/moment/Yaw_rudder">
				<description>Yaw moment due to rudder</description>
				<product>
					<property>aero/qbar-psf</property>
					<property>metrics/Sw-sqft</property>
					<property>metrics/bw-ft</property>
					<property>fcs/rudder-pos-rad</property>
					<value>-0.1</value>
				</product>
			</function>

			<function name="aero/moment/Yaw_aileron">
				<description>Adverse yaw</description>
				<product>
					<property>aero/qbar-psf</property>
					<property>metrics/Sw-sqft</property>
					<property>metrics/bw-ft</property>
					<property>fcs/left-aileron-pos-rad</property>
					<value>-0.01</value>
				</product>
			</function>

		</axis>

	</aerodynamics>

	<external_reactions>
	</external_reactions>

</fdm_config>
